// SBML level 3 version 1

model new_model()
  // model units - substance: substance, time: time, volume: volume, area: area, length: length, extent: substance

  // Compartments:
  compartment kinetics_443_0_ = 1e-15 volume;

  // Species:
  species CaM_Ca4_452_0_ in kinetics_443_0_ = 0;
  // There is a LOT of this in the cell: upto 1% of total protein mass. (Alberts et al) Say 25 uM. Meyer et al Science 256 1199-1202 1992 refer to studies saying it is comparable to CaMK levels.
  species CaM_454_0_ in kinetics_443_0_ = 0.002;
  species CaM_Ca3_456_0_ in kinetics_443_0_ = 0;
  // This is the intermediate where the TR2 end (the high-affinity end) has bound the Ca but the TR1 end has not.
  species CaM_Ca2_458_0_ in kinetics_443_0_ = 0;
  // This is the intermediate where the TR2 end (the high-affinity end) has bound the Ca but the TR1 end has not.
  species CaM_Ca_460_0_ in kinetics_443_0_ = 0;
  species Ca_472_0_ in kinetics_443_0_ = 8e-5;
  species $Ca_input_474_0_ in kinetics_443_0_ = 0;
  species $Ca_ext_478_0_ in kinetics_443_0_ = 8e-5;

  // Reactions:
  // kinetics_443_0_ * CaM_Ca3_bind_Ca_462_0__Kf * CaM_Ca3_456_0_*Ca_472_0_-kinetics_443_0_ * CaM_Ca3_bind_Ca_462_0__Kb * CaM_Ca4_452_0_
  // Use K3 = 21.5 uM here from Stemmer and Klee table 3. kb/kf =21.5 * 6e5 so kf = 7.75e-7, kb = 10
  CaM_Ca3_bind_Ca_462_0_: CaM_Ca3_456_0_ + Ca_472_0_ -> CaM_Ca4_452_0_; kinetics_443_0_*CaM_Ca3_bind_Ca_462_0__Kf*CaM_Ca3_456_0_*Ca_472_0_ - kinetics_443_0_*CaM_Ca3_bind_Ca_462_0__Kb*CaM_Ca4_452_0_;
    CaM_Ca3_bind_Ca_462_0__Kf = 1800 litre_per_mmole_per_second; CaM_Ca3_bind_Ca_462_0__Kb = 10 per_second;
  // kinetics_443_0_ * CaM_bind_Ca_464_0__Kf * CaM_454_0_*Ca_472_0_-kinetics_443_0_ * CaM_bind_Ca_464_0__Kb * CaM_Ca_460_0_
  // Lets use the fast rate consts here. Since the rates are so different, I am not sure whether the order is relevant. These correspond to the TR2C fragment. We use the Martin et al rates here, plus the Drabicowski binding consts. All are scaled by 3X to cell temp. kf = 2e-10 kb = 72 Stemmer _and Klee: K1=.9, K2=1.1. Assume 1.0uM for both. kb/kf=3.6e11. If kb=72, kf = 2e-10 (Exactly the same !) 19 May 2006. Splitting the old CaM-TR2-bind-Ca reaction into two steps, each binding 1 Ca. This improves numerical stability and is conceptually better too. Overall rates are the same, so each kf and kb is the square root of the earlier ones. So kf = 1.125e-4, kb = 8.4853
  CaM_bind_Ca_464_0_: CaM_454_0_ + Ca_472_0_ -> CaM_Ca_460_0_; kinetics_443_0_*CaM_bind_Ca_464_0__Kf*CaM_454_0_*Ca_472_0_ - kinetics_443_0_*CaM_bind_Ca_464_0__Kb*CaM_Ca_460_0_;
    CaM_bind_Ca_464_0__Kf = 8484.6 litre_per_mmole_per_second; CaM_bind_Ca_464_0__Kb = 8.4853 per_second;
  // kinetics_443_0_ * CaM_Ca2_bind_Ca_466_0__Kf * CaM_Ca2_458_0_*Ca_472_0_-kinetics_443_0_ * CaM_Ca2_bind_Ca_466_0__Kb * CaM_Ca3_456_0_
  // K3 = 21.5, K4 = 2.8. Assuming that the K4 step happens first, we get kb/kf = 2.8 uM = 1.68e6 so kf =6e-6 assuming kb = 10
  CaM_Ca2_bind_Ca_466_0_: CaM_Ca2_458_0_ + Ca_472_0_ -> CaM_Ca3_456_0_; kinetics_443_0_*CaM_Ca2_bind_Ca_466_0__Kf*CaM_Ca2_458_0_*Ca_472_0_ - kinetics_443_0_*CaM_Ca2_bind_Ca_466_0__Kb*CaM_Ca3_456_0_;
    CaM_Ca2_bind_Ca_466_0__Kf = 3600 litre_per_mmole_per_second; CaM_Ca2_bind_Ca_466_0__Kb = 10 per_second;
  // kinetics_443_0_ * CaM_Ca_bind_Ca_468_0__Kf * CaM_Ca_460_0_*Ca_472_0_-kinetics_443_0_ * CaM_Ca_bind_Ca_468_0__Kb * CaM_Ca2_458_0_
  // Lets use the fast rate consts here. Since the rates are so different, I am not sure whether the order is relevant. These correspond to the TR2C fragment. We use the Martin et al rates here, plus the Drabicowski binding consts. All are scaled by 3X to cell temp. kf = 2e-10 kb = 72 Stemmer _and Klee: K1=.9, K2=1.1. Assume 1.0uM for both. kb/kf=3.6e11. If kb=72, kf = 2e-10 (Exactly the same !) 19 May 2006. Splitting the old CaM-TR2-bind-Ca reaction into two steps, each binding 1 Ca. This improves numerical stability and is conceptually better too. Overall rates are the same, so each kf and kb is the square root of the earlier ones. So kf = 1.125e-4, kb = 8.4853
  CaM_Ca_bind_Ca_468_0_: CaM_Ca_460_0_ + Ca_472_0_ -> CaM_Ca2_458_0_; kinetics_443_0_*CaM_Ca_bind_Ca_468_0__Kf*CaM_Ca_460_0_*Ca_472_0_ - kinetics_443_0_*CaM_Ca_bind_Ca_468_0__Kb*CaM_Ca2_458_0_;
    CaM_Ca_bind_Ca_468_0__Kf = 8484.6 litre_per_mmole_per_second; CaM_Ca_bind_Ca_468_0__Kb = 8.4853 per_second;
  // kinetics_443_0_ * Ca_stim_476_0__Kf * Ca_input_474_0_
  Ca_stim_476_0_: $Ca_input_474_0_ => Ca_472_0_; kinetics_443_0_*Ca_stim_476_0__Kf*Ca_input_474_0_;
    Ca_stim_476_0__Kf = 20 per_second;
  // kinetics_443_0_ * Ca_homeostasis_480_0__Kf * Ca_ext_478_0_-kinetics_443_0_ * Ca_homeostasis_480_0__Kb * Ca_472_0_
  Ca_homeostasis_480_0_: $Ca_ext_478_0_ -> Ca_472_0_; kinetics_443_0_*Ca_homeostasis_480_0__Kf*Ca_ext_478_0_ - kinetics_443_0_*Ca_homeostasis_480_0__Kb*Ca_472_0_;
    Ca_homeostasis_480_0__Kf = 0.5 per_second; Ca_homeostasis_480_0__Kb = 0.5 per_second;

  // Unit definitions:
  unit volume = litre;
  unit substance = 1e-3 mole;
  unit length = metre;
  unit area = metre^2;
  unit time = second;
  unit litre_per_mmole_per_second = litre / (1e-3 mole * second);
  unit per_second = 1 / second;
end
